# Case 1: Random array test
A := READPRN("C:\Zedd\old\new.txt")
A = [
    1, 358, 263, 260;
    2, 560, 150, 153;
    3, 309, 419, 312;
    4, 468, 661, 529;
    5, 569, 798, 832;
    6, 737, 838, 979;
    7, 826, 979, 1334;
    8, 1162, 1667, 2022;
    9, 1707, 1805, 1960;
    10, 1466, 2875, 3007;
    11, 1535, 2934, 3426;
    12, 1526, 3460, 3757;
    13, 2414, 3686, 4497;
    14, 2009, 4542, 4894;
    15, 2496, 5735, 5934;
    16, 2930, 6925, 6662;
    17, 2686, 7057, 6249;
    18, 2753, 7534, 8198;
    19, 3095, 8568, 8516
]
K := A[:, 0]
Qsort := A[:, 1]
Bsort := A[:, 2]
Osort := A[:, 3]
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# Case 2: Ascending array test
B := READPRN("C:\Zedd\asc.txt")
B = [
    2, 183, 110;
    3, 236, 120;
    4, 324, 107;
    5, 450, 119;
    6, 483, 156;
    7, 520, 162;
    8, 652, 278;
    9, 848, 217;
    10, 801, 211;
    11, 801, 290;
    12, 887, 221;
    13, 1049, 233;
    14, 982, 242;
    15, 1101, 306;
    16, 1239, 266;
    17, 1398, 388;
    18, 1438, 321;
    19, 1420, 318
]
K := B[:, 0]
Qsort := B[:, 1]
Bsort := B[:, 2]
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# Case 3: Descending array test
C := READPRN("C:\Zedd\dec.txt")
C = [
    2, 230, 192;
    3, 278, 441;
    4, 339, 627;
    5, 367, 951;
    6, 489, 1205;
    7, 642, 1535;
    8, 841, 1957;
    9, 1049, 2535;
    10, 1056, 3074;
    11, 847, 3845;
    12, 945, 4356;
    13, 1257, 5246;
    14, 1144, 5873;
    15, 1217, 6757;
    16, 1300, 7913;
    17, 1575, 8779;
    18, 1429, 9840;
    19, 1630, 10721
]
K := C[:, 0]
Qsort := C[:, 1]
Bsort := C[:, 2]
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